new LineCode.3p_ug_al_3_1 NPhases=3 Units=km RMatrix=(0.445 0.1745 0.1745 |0.1745 0.445 0.1745 |0.1745 0.1745 0.445 ) XMatrix=(0.5326 0.2912 0.2912 |0.2912 0.5326 0.2912 |0.2912 0.2912 0.5326 ) CMatrix=(145.291 -72.088 -72.088 |-72.088 145.291 -72.088 |-72.088 -72.088 145.291 ) NormAmps=285.0
new LineCode.padswitch_3_6 NPhases=3 Units=km RMatrix=(0.001 0.0 0.0 |0.0 0.001 0.0 |0.0 0.0 0.001 ) XMatrix=(0.001 0.0 0.0 |0.0 0.001 0.0 |0.0 0.0 0.001 ) CMatrix=(3.499563 -0.1093613 -0.1093613 |-0.1093613 3.499563 -0.1093613 |-0.1093613 -0.1093613 3.499563 ) NormAmps=115.0
new LineCode.1p_ug_al_1 NPhases=1 Units=km RMatrix=(0.9176999999999998 ) XMatrix=(0.9546999999999999 ) CMatrix=(158.492 ) NormAmps=151.0
new LineCode.p3uhs2_1247_3p_oh_al_acsr_477kcmil_hawk_3_parallel_2 NPhases=3 Units=km RMatrix=(0.08658335 0.025333335 0.025333335 |0.025333335 0.08658335 0.025333335 |0.025333335 0.025333335 0.08658335 ) XMatrix=(0.28901664999999993 0.09786665 0.09786665 |0.09786665 0.28901664999999993 0.09786665 |0.09786665 0.09786665 0.28901664999999993 ) CMatrix=(16.080866 -7.070934 -7.070934 |-7.070934 16.080866 -7.070934 |-7.070934 -7.070934 16.080866 ) NormAmps=1190.0
new LineCode.p3uhs2_1247_3p_ug_al_750kcmil_3_2 NPhases=3 Units=km RMatrix=(0.22961329999999996 0.1512433 0.1512433 |0.1512433 0.22961329999999996 0.1512433 |0.1512433 0.1512433 0.22961329999999996 ) XMatrix=(0.54 0.2955 0.2955 |0.2955 0.54 0.2955 |0.2955 0.2955 0.54 ) CMatrix=(169.559 -84.214 -84.214 |-84.214 169.559 -84.214 |-84.214 -84.214 169.559 ) NormAmps=550.0
new LineCode.1p_oh_al_4_periwinkle_2 NPhases=2 Units=km RMatrix=(1.7609666666666666 0.3959666666666668 |0.3959666666666668 1.7609666666666666 ) XMatrix=(0.6698333333333334 0.5686333333333333 |0.5686333333333333 0.6698333333333334 ) CMatrix=(36.92503333333334 -17.558966666666667 |-17.558966666666667 36.92503333333334 ) NormAmps=115.0
new LineCode.p3uhs2_1247_3p_oh_al_acsr_336kcmil_merlin_3 NPhases=3 Units=km RMatrix=(0.2377333 0.06463333 0.06463333 |0.06463333 0.2377333 0.06463333 |0.06463333 0.06463333 0.2377333 ) XMatrix=(0.6083333 0.2055333 0.2055333 |0.2055333 0.6083333 0.2055333 |0.2055333 0.2055333 0.6083333 ) CMatrix=(7.7076 -3.3441 -3.3441 |-3.3441 7.7076 -3.3441 |-3.3441 -3.3441 7.7076 ) NormAmps=475.0
new LineCode.p3uhs2_1247_3p_oh_code_3_1 NPhases=3 Units=km RMatrix=(0.22464633333333334 0.05016533333333334 0.05016533333333334 |0.05016533333333334 0.22464633333333334 0.05016533333333334 |0.05016533333333334 0.05016533333333334 0.22464633333333334 ) XMatrix=(0.631065 0.188089 0.188089 |0.188089 0.631065 0.188089 |0.188089 0.188089 0.631065 ) CMatrix=(2.8000000000000003 -0.6 -0.6 |-0.6 2.8000000000000003 -0.6 |-0.6 -0.6 2.8000000000000003 ) NormAmps=900.0
new LineCode.3p_ug_al_350kcmil_3_2 NPhases=3 Units=km RMatrix=(0.3388667 0.1744667 0.1744667 |0.1744667 0.3388667 0.1744667 |0.1744667 0.1744667 0.3388667 ) XMatrix=(0.5126 0.2912 0.2912 |0.2912 0.5126 0.2912 |0.2912 0.2912 0.5126 ) CMatrix=(164.36499999999998 -81.63499999999999 -81.63499999999999 |-81.63499999999999 164.36499999999998 -81.63499999999999 |-81.63499999999999 -81.63499999999999 164.36499999999998 ) NormAmps=370.0
