new Line.2f631f31-8b8f-4f55-88da-449d60a188b4 Bus1=70fc3a22-ca16-41d8-b5dc-af0c65e75193.1.2.3 Bus2=45690010-932b-464c-803c-70ec6bd9d2f3.1.2.3 LineCode=3p_ug_al_3_1 Length=1.000006126133323 Phases=3 Units=m
new Line.855a5338-8ade-4018-8764-2a8dc1ca14a9 Bus1=70fc3a22-ca16-41d8-b5dc-af0c65e75193.1.2.3 Bus2=56714f70-c33d-4849-9a18-4b0738714679.1.2.3 LineCode=padswitch_3_6 Length=150.00055237297272 Phases=3 Units=m
new Line.c3db8e2d-9c1c-4ec0-825e-309f673184da Bus1=45690010-932b-464c-803c-70ec6bd9d2f3.1.2.3 Bus2=e64a1a12-434e-4e78-a7b5-ac29decc26a9.1.2.3 LineCode=padswitch_3_6 Length=140.1767868924695 Phases=3 Units=m
new Line.bc9aebb9-bc24-416a-bfff-4ac211fb7ebf Bus1=45690010-932b-464c-803c-70ec6bd9d2f3.1.2.3 Bus2=a1d9699d-8ea3-423c-a6fa-b144f5862573.1.2.3 LineCode=padswitch_3_6 Length=62.4372579831447 Phases=3 Units=m
new Line.80c80032-e041-4226-a937-242ee20d5e85 Bus1=45690010-932b-464c-803c-70ec6bd9d2f3.3 Bus2=be711182-83fc-4e36-bae4-c711c480c412.3 LineCode=1p_ug_al_1 Length=72.30218745152375 Phases=1 Units=m
new Line.e85d5cef-2962-44f4-8682-2469a04b34dc Bus1=45690010-932b-464c-803c-70ec6bd9d2f3.1.2.3 Bus2=d6b741e3-6a61-434d-947c-675ddb991c06.1.2.3 LineCode=padswitch_3_6 Length=1.0000001182269613 Phases=3 Units=m
new Line.b50b0793-b436-4e12-a6f7-c1da658ae46b Bus1=45690010-932b-464c-803c-70ec6bd9d2f3.1.2.3 Bus2=ca669c0f-7775-4b14-b649-f61a33768883_ht.1.2.3 LineCode=padswitch_3_6 Length=0.1472427314843281 Phases=3 Units=m
new Line.a72653f8-0d8d-440d-a39b-f97bddf2696d Bus1=e64a1a12-434e-4e78-a7b5-ac29decc26a9.1.2.3 Bus2=89e18ef8-9c8d-40f0-941c-d02ccfdfbf79.1.2.3 LineCode=padswitch_3_6 Length=82.85239397080244 Phases=3 Units=m
new Line.167abbdb-820f-44e3-a50b-1dc95c2cff0b Bus1=e64a1a12-434e-4e78-a7b5-ac29decc26a9.1.2.3 Bus2=b25b4b08-f30c-415e-b7eb-e98613758106_ht.1.2.3 LineCode=padswitch_3_6 Length=0.14724280131373876 Phases=3 Units=m
new Line.5d4e02ef-82b2-4572-8d45-ddc3ec540e5e Bus1=89e18ef8-9c8d-40f0-941c-d02ccfdfbf79.1.2.3 Bus2=f39b532c-ddd3-4d1c-b48d-9fef4dc9e597.1.2.3 LineCode=padswitch_3_6 Length=59.621781058818996 Phases=3 Units=m
new Line.1c3f99bf-ba11-4748-9a9a-9d4ca8d33554 Bus1=89e18ef8-9c8d-40f0-941c-d02ccfdfbf79.1.2.3 Bus2=a8264a1f-8bdb-49d3-930e-4be38016f2c9_ht.1.2.3 LineCode=padswitch_3_6 Length=0.1472425829296012 Phases=3 Units=m
new Line.f0433e00-6f65-4065-a378-9b6af1b7ecf9 Bus1=f39b532c-ddd3-4d1c-b48d-9fef4dc9e597.1.2.3 Bus2=2541e73b-56bf-4daf-bd4b-bd25ce29afe9_ht.1.2.3 LineCode=padswitch_3_6 Length=0.1472428921344471 Phases=3 Units=m
new Line.31bf0e1e-2fcc-41eb-aee8-cd7bc90495a4 Bus1=2541e73b-56bf-4daf-bd4b-bd25ce29afe9.1.2.3 Bus2=5bd1300f-8626-4446-9f22-367c29686a01.1.2.3 LineCode=p3uhs2_1247_3p_oh_al_acsr_477kcmil_hawk_3_parallel_2 Length=0.1472428921344471 Phases=3 Units=m
new Line.9582f813-522f-44d4-a1d5-f857b7f9d32f Bus1=a8264a1f-8bdb-49d3-930e-4be38016f2c9.1.2.3 Bus2=2347ee52-1203-4833-8cbd-d02b56adebe3.1.2.3 LineCode=3p_ug_al_3_1 Length=0.1472425829296012 Phases=3 Units=m
new Line.5e4cb873-67ce-4509-a7a1-148b8e4dc2a2 Bus1=b25b4b08-f30c-415e-b7eb-e98613758106.1.2.3 Bus2=83a9f433-af68-46f3-94e7-19c5c7671f7b.1.2.3 LineCode=p3uhs2_1247_3p_ug_al_750kcmil_3_2 Length=0.14724280131373876 Phases=3 Units=m
new Line.8ed6b57c-46f8-4c64-8b65-5602b873a43f Bus1=a1d9699d-8ea3-423c-a6fa-b144f5862573.1.2.3 Bus2=cf0fd393-9c43-42fb-84fd-e226cf0d2762_ht.1.2.3 LineCode=padswitch_3_6 Length=0.14724262175616604 Phases=3 Units=m
new Line.0862f238-96ef-401a-b7f9-4ff0a61e5ef6 Bus1=cf0fd393-9c43-42fb-84fd-e226cf0d2762.1.2.3 Bus2=35e54c4e-fa4f-44b4-97e8-8aeb1328ab5c.1.2.3 LineCode=3p_ug_al_3_1 Length=0.14724262175616604 Phases=3 Units=m
new Line.7d116ded-2b84-4b9a-a834-795b956e435e Bus1=be711182-83fc-4e36-bae4-c711c480c412.3 Bus2=10dfe567-9b2b-493f-a1e8-641c6b812ec8.3 LineCode=1p_ug_al_1 Length=150.00000619873532 Phases=1 Units=m
new Line.3ac56b75-e148-4d60-b3df-dd67f3f3dc87 Bus1=10dfe567-9b2b-493f-a1e8-641c6b812ec8.3 Bus2=95da94dd-03a6-4f0a-beca-91f13ec208ff.3 LineCode=1p_ug_al_1 Length=149.99998257255598 Phases=1 Units=m
new Line.ae84ac61-e1cb-434e-9b56-e9ff76166470 Bus1=95da94dd-03a6-4f0a-beca-91f13ec208ff.3 Bus2=5409352605.3 LineCode=1p_ug_al_1 Length=0.999999804035291 Phases=1 Units=m
new Line.a27984fe-66ca-4105-84be-19b9f8f530d4 Bus1=5409352605.3 Bus2=ceac6d82-efab-40dc-a61b-1d65a365740a.3 LineCode=1p_ug_al_1 Length=20.415038988591142 Phases=1 Units=m
new Line.3303a5d3-d697-47be-954d-f352bae9ca65 Bus1=ceac6d82-efab-40dc-a61b-1d65a365740a.3 Bus2=616635b3-444c-4ccf-beaa-1f2536c2cc30_ht.3 LineCode=1p_ug_al_1 Length=0.14724481043411633 Phases=1 Units=m
new Line.d729185e-d4f8-4e59-b70a-e56f70452a27 Bus1=616635b3-444c-4ccf-beaa-1f2536c2cc30.1.2 Bus2=15071efc-c540-44c6-a976-8cb747be08e2.1.2 LineCode=1p_oh_al_4_periwinkle_2 Length=0.14724481043411633 Phases=2 Units=m
new Line.9c08387e-3eff-484a-9777-5065210f1cce Bus1=d6b741e3-6a61-434d-947c-675ddb991c06.1.2.3 Bus2=8c63d7f8-225a-4e2d-85d6-f9f0029a5e58.1.2.3 LineCode=padswitch_3_6 Length=150.00000271487946 Phases=3 Units=m
new Line.6cbd481a-f7a6-4d9a-9662-095e1a0e540d Bus1=8c63d7f8-225a-4e2d-85d6-f9f0029a5e58.1.2.3 Bus2=7be3484f-b527-4501-8be8-66853e81af9f.1.2.3 LineCode=padswitch_3_6 Length=28.272635030369642 Phases=3 Units=m
new Line.59606e37-e01b-49b5-8dc2-8c67a6382e44 Bus1=7be3484f-b527-4501-8be8-66853e81af9f.1.2.3 Bus2=5d06d36b-3aaf-4d07-ac12-69c4a0932ee8.1.2.3 LineCode=padswitch_3_6 Length=92.28774023621683 Phases=3 Units=m
new Line.ea346d4b-efe0-485f-a45a-a15b0029d9d7 Bus1=7be3484f-b527-4501-8be8-66853e81af9f.3 Bus2=a0c0debe-c0f5-4f6d-830f-f64cbbec160b_ht.3 LineCode=1p_ug_al_1 Length=0.1472437258001445 Phases=1 Units=m
new Line.5cb0a1ae-312f-4f00-b552-b80af531f73d Bus1=5d06d36b-3aaf-4d07-ac12-69c4a0932ee8.1.2.3 Bus2=0c0a3e54-d4a2-438f-8bc2-23b9afed0556.1.2.3 LineCode=padswitch_3_6 Length=91.78522837544028 Phases=3 Units=m
new Line.58790e6f-9c49-4bd5-8d40-b5430cb16327 Bus1=5d06d36b-3aaf-4d07-ac12-69c4a0932ee8.1.2.3 Bus2=13254bc4-1b12-4779-b908-9ec48befa991.1.2.3 LineCode=padswitch_3_6 Length=82.52363326545353 Phases=3 Units=m
new Line.097f5f19-9132-4f08-b19e-525d87d52dac Bus1=5d06d36b-3aaf-4d07-ac12-69c4a0932ee8.1.2.3 Bus2=0c3988af-054c-4bcb-a4e0-0c52e491617c.1.2.3 LineCode=padswitch_3_6 Length=23.580483315393653 Phases=3 Units=m
new Line.e30b1189-e55b-4a11-80d5-3d1ad8f88e92 Bus1=5d06d36b-3aaf-4d07-ac12-69c4a0932ee8.1.2.3 Bus2=8ae245c9-3020-4fd5-b15f-f05db0760f8b_ht.1.2.3 LineCode=padswitch_3_6 Length=0.14724370056427108 Phases=3 Units=m
new Line.7f0c4eb0-abd8-4fc7-92d6-ddceb58f53a3 Bus1=0c0a3e54-d4a2-438f-8bc2-23b9afed0556.1.2.3 Bus2=7a661f46-e06b-4abd-9ab6-308292ffbce1_ht.1.2.3 LineCode=padswitch_3_6 Length=0.14724407121385297 Phases=3 Units=m
new Line.a7bc477f-a0e5-4cbd-a539-d4df2e3505e1 Bus1=7a661f46-e06b-4abd-9ab6-308292ffbce1.1.2.3 Bus2=9194ddbf-663f-4b75-9695-dcce6cb22da0.1.2.3 LineCode=p3uhs2_1247_3p_ug_al_750kcmil_3_2 Length=0.14724407121385297 Phases=3 Units=m
new Line.056fba19-ba11-44a1-86d6-d5bb07e3ba75 Bus1=13254bc4-1b12-4779-b908-9ec48befa991.1.2.3 Bus2=eb44104c-fc27-4214-a41c-48e1075ecf69_ht.1.2.3 LineCode=padswitch_3_6 Length=0.14724325131040114 Phases=3 Units=m
new Line.b3c7810d-0b4a-4a11-9573-5ed9cc63e4fd Bus1=eb44104c-fc27-4214-a41c-48e1075ecf69.1.2.3 Bus2=87247798-66b7-4284-9997-820786b56f27.1.2.3 LineCode=p3uhs2_1247_3p_ug_al_750kcmil_3_2 Length=0.14724325131040114 Phases=3 Units=m
new Line.80215b0c-75e5-4604-b3b8-b5768bc3fd8f Bus1=0c3988af-054c-4bcb-a4e0-0c52e491617c.1.2.3 Bus2=78d45755-c4b0-42cf-8afe-503d84cd3c1a_ht.1.2.3 LineCode=padswitch_3_6 Length=0.1472437563719978 Phases=3 Units=m
new Line.f8b5ffa6-7024-4da9-8de5-1ba644e0f4ac Bus1=78d45755-c4b0-42cf-8afe-503d84cd3c1a.1.2.3 Bus2=f654c87a-b747-42e4-9bab-186cfdead766.1.2.3 LineCode=3p_ug_al_3_1 Length=0.1472437563719978 Phases=3 Units=m
new Line.0b72e3b0-520f-4606-b563-b69d87c7f5cc Bus1=8ae245c9-3020-4fd5-b15f-f05db0760f8b.1.2.3 Bus2=9d18f518-2df3-4980-a11f-f19e0904526f.1.2.3 LineCode=p3uhs2_1247_3p_oh_al_acsr_336kcmil_merlin_3 Length=0.14724370056427108 Phases=3 Units=m
new Line.54db1723-4ade-46fb-9485-fc812dc30a03 Bus1=a0c0debe-c0f5-4f6d-830f-f64cbbec160b.1.2 Bus2=d22b6154-489b-4db6-9522-b09e179549fe.1.2 LineCode=1p_oh_al_4_periwinkle_2 Length=0.1472437258001445 Phases=2 Units=m
new Line.3926f2b8-d318-4352-97ba-469a0b35c577 Bus1=ca669c0f-7775-4b14-b649-f61a33768883.1.2.3 Bus2=5ab3a1da-9a13-44b4-b266-e490553fe31e.1.2.3 LineCode=3p_ug_al_3_1 Length=0.1472427314843281 Phases=3 Units=m
new Line.ea9d8ed2-1951-44a3-b8d3-6e97efffa40a Bus1=56714f70-c33d-4849-9a18-4b0738714679.1.2.3 Bus2=e6c84604-1711-4f63-9386-33cf74daed2b.1.2.3 LineCode=padswitch_3_6 Length=149.99982410345007 Phases=3 Units=m
new Line.765a067e-49f0-4988-ad31-7a03e8142f85 Bus1=e6c84604-1711-4f63-9386-33cf74daed2b.1.2.3 Bus2=67c2d54d-17b0-4b89-833f-eb9f2a6b8c5d.1.2.3 LineCode=padswitch_3_6 Length=78.5379936503952 Phases=3 Units=m
new Line.cb478cf7-dbe4-4bf6-9624-24318708cb29 Bus1=67c2d54d-17b0-4b89-833f-eb9f2a6b8c5d.1.2.3 Bus2=042f56a8-caa8-481e-8a55-7b46565e15c3.1.2.3 LineCode=padswitch_3_6 Length=0.9999995897799899 Phases=3 Units=m
new Line.67b65c8a-bb99-4d37-8c88-0ff72d7c147c Bus1=67c2d54d-17b0-4b89-833f-eb9f2a6b8c5d.1.2.3 Bus2=cfaa4401-f00b-40fb-a13d-7a5d198f8309_ht.1.2.3 LineCode=padswitch_3_6 Length=0.14724174104047977 Phases=3 Units=m
new Line.debbd30c-3514-4c80-8bd9-f41abe19e191 Bus1=042f56a8-caa8-481e-8a55-7b46565e15c3.1.2.3 Bus2=980dce31-7512-4fc7-a118-031ed0dac06f.1.2.3 LineCode=padswitch_3_6 Length=149.99999536928004 Phases=3 Units=m
new Line.f3478525-807c-4206-85f0-0aeaaeaf37b4 Bus1=980dce31-7512-4fc7-a118-031ed0dac06f.1.2.3 Bus2=95c60d63-de35-4582-b482-3faa44927ad6.1.2.3 LineCode=padswitch_3_6 Length=13.310721860837763 Phases=3 Units=m
new Line.8e5d9bcb-b2c2-4a64-9020-307faf469b9e Bus1=95c60d63-de35-4582-b482-3faa44927ad6.1.2.3 Bus2=4d4d39a8-8fff-4ae5-8649-42c01b48904e_ht.1.2.3 LineCode=padswitch_3_6 Length=0.14724261945863618 Phases=3 Units=m
new Line.5a1aa316-3f1d-426d-8b02-afa2aadc542c Bus1=4d4d39a8-8fff-4ae5-8649-42c01b48904e.1.2.3 Bus2=3d7b450f-9d2e-45e3-8448-895bd3ab13ab.1.2.3 LineCode=p3uhs2_1247_3p_oh_code_3_1 Length=0.14724261945863618 Phases=3 Units=m
new Line.e42217db-3c72-48bd-a89e-215b40b76348 Bus1=cfaa4401-f00b-40fb-a13d-7a5d198f8309.1.2.3 Bus2=362354e7-a8dc-4a45-9260-efc421474f0a.1.2.3 LineCode=3p_ug_al_350kcmil_3_2 Length=0.14724174104047977 Phases=3 Units=m
